// SBML level 2 version 1
// Model Starts Here

model untitled()

  // Compartments:
  compartment compartment = 1;

  // Species:
  species E1 in compartment = 1;
  species E1_P in compartment = 0;
  species E2 in compartment = 2;
  species E2_P in compartment = 0;
  species E3 in compartment = 4;
  species E3_P in compartment = 0;
  species $Input in compartment = 100;

  // Parameters:
  J0_V1 = 1;
  J0_Km1 = 0.02;
  J0_ki = 0.01;
  J1_J1_Vmax = 0.9;
  J1_J1_Km1 = 0.01;
  J2_V2 = 12;
  J2_Km2 = 0.01;
  J3_J3_Vmax = 6;
  J3_J3_Km1 = 0.01;
  J4_V3 = 1.1;
  J4_Km3 = 0.1;
  J5_J5_Vmax = 1.1;
  J5_J5_Km1 = 0.1;

  // Reactions:
  J0: E1 => E1_P; J0_V1*Input*E1/(J0_Km1 + E1 + E3_P*J0_ki);
  J1: E1_P => E1; J1_J1_Vmax*E1_P/(J1_J1_Km1 + E1_P);
  J2: E2 => E2_P; J2_V2*E1_P*E2/(J2_Km2 + E2);
  J3: E2_P => E2; J3_J3_Vmax*E2_P/(J3_J3_Km1 + E2_P);
  J4: E3 => E3_P; J4_V3*E2_P*E3/(J4_Km3 + E3);
  J5: E3_P => E3; J5_J5_Vmax*E3_P/(J5_J5_Km1 + E3_P);
end
