// SBML level 2 version 1
// Model Starts Here

model Jana_WolfGlycolysis()

  // Compartments:
  compartment compartment = 1;

  // Species:
  species Glucose in compartment = 0;
  species fructose_1_6_bisphosphate in compartment = 0;
  species glyceraldehyde_3_phosphate in compartment = 0;
  species glycerate_3_phosphate in compartment = 0;
  species pyruvate in compartment = 0;
  species Acetyladehyde in compartment = 0;
  species External_acetaldehyde in compartment = 0;
  species ATP in compartment = 3;
  species ADP in compartment = 1;
  species NAD in compartment = 0.5;
  species NADH in compartment = 0.5;
  species $External_glucose in compartment = 0;
  species $ethanol in compartment = 0;
  species $Glycerol in compartment = 0;
  species $Sink in compartment = 0;

  // Reactions:
  J0: $External_glucose => Glucose; inputFlux;
    inputFlux = 50;
  J1: Glucose + 2 ATP => fructose_1_6_bisphosphate + 2 ADP; k1*Glucose*ATP*(1/(1 + (ATP/Ki)^n));
    k1 = 550; Ki = 1; n = 4;
  J2: fructose_1_6_bisphosphate => glyceraldehyde_3_phosphate + glyceraldehyde_3_phosphate; J2_k*fructose_1_6_bisphosphate;
    J2_k = 9.8;
  J3: glyceraldehyde_3_phosphate + NADH => NAD + $Glycerol; J3_k*glyceraldehyde_3_phosphate*NADH;
    J3_k = 85.7;
  J4: glyceraldehyde_3_phosphate + ADP + NAD => ATP + glycerate_3_phosphate + NADH; (kg*kp*glyceraldehyde_3_phosphate*NAD*ADP - ka*kk*glycerate_3_phosphate*ATP*NADH)/(ka*NADH + kp*ADP);
    kg = 323.8; kp = 76411.1; ka = 57823.1; kk = 23.7;
  J5: glycerate_3_phosphate + ADP => ATP + pyruvate; J5_k*glycerate_3_phosphate*ADP;
    J5_k = 80;
  J6: pyruvate => Acetyladehyde; J6_k*pyruvate;
    J6_k = 9.7;
  J7: Acetyladehyde + NADH => NAD + $ethanol; J7_k*Acetyladehyde*NADH;
    J7_k = 2000;
  J8: Acetyladehyde => External_acetaldehyde; J8_k1*Acetyladehyde - J8_k2*External_acetaldehyde;
    J8_k1 = 375; J8_k2 = 375;
  J9: ATP => ADP; J9_k*ATP;
    J9_k = 28;
  J10: External_acetaldehyde => $Sink; J10_k*External_acetaldehyde;
    J10_k = 80;
end
