// SBML level 2 version 1
// Model Starts Here

model untitled()

  // Compartments:
  compartment compartment = 1;

  // Species:
  species p53 in compartment = 1.59967;
  species p53p in compartment = 0.02979;
  species mdm2 in compartment = 0;
  species arf in compartment = 0.0728;
  species arfmdm2 in compartment = 0;
  species p53mdm2 in compartment = 0.9554;
  species siah in compartment = 0.00106;
  species bcatenin in compartment = 2.18466;
  species siahbcatenin in compartment = 0.00349;
  species Damage in compartment = 10;
  species p53pmdm2 in compartment = 0;
  species atm in compartment = 0.99992;
  species atm_p in compartment = 8e-5;
  species nbs1 in compartment = 0.99998;
  species nbs1_p in compartment = 2e-5;
  species $w4 in compartment = 0;
  species $ARF_Gene in compartment = 0.1008971;
  species $w in compartment = 0.1;
  species $w1 in compartment = 0.1362383;
  species $source in compartment = 0.4440599;
  species $w3 in compartment = 0.1;
  species $w2 in compartment = 0;
  species $P53_Gene in compartment = 0.1008971;
  species $w5 in compartment = 0;
  species $w6 in compartment = 0;
  species $w7 in compartment = 0;
  species $w8 in compartment = 0;
  species $SIAH_Gene in compartment = 0.1008971;
  species $Mdm2_Gene in compartment = 0.1008971;
  species $w9 in compartment = 0;
  species $A1 in compartment = 0;
  species $A2 in compartment = 0;
  species $A3 in compartment = 0;
  species $JI1 in compartment = 0;
  species $A4 in compartment = 0;
  species $A5 in compartment = 0;
  species $A7 in compartment = 0;

  // Reactions:
  J1: p53 => p53p; p53/(kp5 + p53)*atm_p + con;
    kp5 = 0.4; con = 0.0001;
  J10: arf => $w1; J10_k*arf;
    J10_k = 0.3;
  J7: mdm2 + arf => arfmdm2; J7_k*mdm2*arf;
    J7_k = 15;
  J8: arfmdm2 => $w1 + arf; J8_k*arfmdm2;
    J8_k = 2;
  J16: p53 + mdm2 => p53mdm2; J16_k*p53*mdm2;
    J16_k = 1;
  J17: p53mdm2 => mdm2 + $w; J17_k*p53mdm2;
    J17_k = 1;
  J19: $source => bcatenin; J19_k*source;
    J19_k = 1;
  J22: siah + bcatenin => siahbcatenin; J22_k*siah*bcatenin;
    J22_k = 3;
  J23: siahbcatenin => siah + $w3; J23_k*siahbcatenin;
    J23_k = 2;
  J24: $ARF_Gene => arf; Pb*bcatenin;
    Pb = 0.01;
  J12: Damage => $w2; Damage*p53p*nbs1_p*n*atm_p;
    n = 0.0008;
  J27: p53p => p53; PHOS*p53p/(kdep + p53p);
    PHOS = 1e-6; kdep = 1;
  J28: p53p + mdm2 => p53pmdm2; J28_k*p53p*mdm2;
    J28_k = 0.005;
  J0_9615: atm => atm_p; atm/(k1 + atm)*nbs1_p + cons1;
    k1 = 0.01; cons1 = 0.0001;
  xJ139542: atm_p => atm; atm_p/(k2 + atm_p)*(alpha/(k0 + Damage));
    k2 = 1; alpha = 0.3; k0 = 0.1;
  J2_9615: nbs1 => nbs1_p; nbs1/(k4 + nbs1)*atm_p + cons2;
    k4 = 0.01; cons2 = 0.0001;
  J3: nbs1_p => nbs1; nbs1_p/(k3 + nbs1_p);
    k3 = 0.1;
  J30: mdm2 => $w4; J30_k*mdm2;
    J30_k = 1e-5;
  J31: $P53_Gene => p53; c0;
    c0 = 0.8;
  J32: p53p => $w5; J5_k*p53p;
    J5_k = 0.006;
  J33: p53 => $w6; J18_k*p53;
    J18_k = 0.5;
  J34: p53pmdm2 => mdm2 + $w7; J29_k*p53pmdm2;
    J29_k = 1;
  J29: siah => $w8; J25_k*siah;
    J25_k = 0.02;
  J35: $SIAH_Gene => siah; P2*p53p^4/(ks + p53p^4);
    P2 = 0.1; ks = 10000;
  J36: $Mdm2_Gene => mdm2; P1*p53p^4/(kp + p53p^4);
    P1 = 0.4; kp = 1;
  J37: bcatenin => $w9; J26_k*bcatenin;
    J26_k = 0.2;
  Activator2: atm_p => $A2; Activator2_k*atm_p;
    Activator2_k = 0;
  Activator1: nbs1_p => $A1; Activator1_k*nbs1_p;
    Activator1_k = 0;
  Activator3: p53p => $A3; Activator3_k*p53p;
    Activator3_k = 0;
  JI1_Inhibitor: Damage => $JI1; JI1_Inhibitor_k*Damage;
    JI1_Inhibitor_k = 0;
  Activator4: nbs1_p => $A4; Activator4_k*nbs1_p;
    Activator4_k = 0;
  Activator_5: atm_p => $A5; Activator_5_k*atm_p;
    Activator_5_k = 0;
  Activator7: p53p => $A7; Activator7_k*p53p;
    Activator7_k = 0;
end
