// SBML level 2 version 1

model untitled()

  // Compartments:
  compartment default;
  compartment ER in default;

  // Species:
  species Ligand in default = 0.5/default;
  species GPCR in default = 0.1/default;
  species PIP_space_kinase in default = 0.9/default;
  species PI_space_kinase in default = 1.1/default;
  species DGK in default = 1.4/default;
  species PIP in default = 0.4/default;
  species PI in default = 1/default;
  species IP_sub_3_endsub_R_space_I1 in default = 1.5/default;
  species IP_sub_3_endsub_R_space_I2 in default = 0.3/default;
  species DAG in default = 0.5/default;
  species IP_sub_3_endsub in default = 2/default; IP_sub_3_endsub is "IP_sub_3_endsub_";
  species PIP_sub_2_endsub in default = 1/default; PIP_sub_2_endsub is "PIP_sub_2_endsub_";
  species s5 in ER = 0.1/ER; s5 is "IP_sub_3_endsub_R";
  species s41 in ER = 0.9/ER; s41 is "IP_sub_3_endsub_R";
  species RGS in default = 0.1/default;
  species PLC_beta in default = 0.3/default; PLC_beta is "PLC_beta_";
  species G_beta__gamma in default = 0.8/default; G_beta__gamma is "G_beta__gamma_";
  species Ca_super_2_plus__endsuper_default in default = 0.6/default;
  species s49 in default = 0.4/default; s49 is "Complex(CaM,Ca_super_2_plus__endsuper_)";
  species GTP in default = 0.7/default;
  species GDP in default = 1.8/default;
  species Ligand_space_GPCR in default = 0.2/default;
  species CaM in default = 0.2/default;
  species s59 in default = 0.1/default; s59 is "Complex(Ca_super_2_plus__endsuper_,CaM,RGS)";
  species Ca_super_2_plus__endsuper_ER in ER = 1.8/ER;
  species Complex_G_alpha__PLC_beta__GTP in default = 1.2/default; Complex_G_alpha__PLC_beta__GTP is "Complex(G_alpha_,PLC_beta_,GTP)";
  species Complex_GTP_G_alpha in default = 2.2/default; Complex_GTP_G_alpha is "Complex(GTP,G_alpha_)";
  species s88 in default = 0; s88 is "Complex(GTP,G_alpha_,G_beta__gamma_)";
  species s91 in default = 0.4/default; s91 is "Complex(G_alpha_,G_beta__gamma_,GTP,Ligand_space_GPCR)";
  species s95 in default = 1/default; s95 is "Complex(G_alpha_,G_beta__gamma_,Ligand_space_GPCR)";
  species s99 in default = 0; s99 is "Complex(G_alpha_,G_beta__gamma_,GDP,Ligand_space_GPCR)";
  species Complex_G_alpha__PLC_beta__GDP in default = 1.7/default; Complex_G_alpha__PLC_beta__GDP is "Complex(G_alpha_,PLC_beta_,GDP)";
  species Complex_GDP_G_alpha in default = 0.5/default; Complex_GDP_G_alpha is "Complex(GDP,G_alpha_)";
  species s106 in default = 1.5/default; s106 is "Complex(G_alpha_,G_beta__gamma_,GDP)";

  // Reactions:
  re4: Ligand + GPCR => Ligand_space_GPCR; k25*Ligand*GPCR;
    k25 = 1;
  re8: Ligand_space_GPCR => GPCR + Ligand; k29*Ligand_space_GPCR;
    k29 = 1;
  re12: PIP_sub_2_endsub -> IP_sub_3_endsub + DAG; (k33f*Complex_G_alpha__PLC_beta__GTP*PIP_sub_2_endsub/k33s - k33b*Complex_G_alpha__PLC_beta__GTP*IP_sub_3_endsub*DAG/k33p)/(1 + PIP_sub_2_endsub/k33s + IP_sub_3_endsub*DAG/k33p);  // modifiers: Complex_G_alpha__PLC_beta__GTP
    k33f = 1; k33b = 1; k33s = 1; k33p = 1;
  re13: s5 -> s41; (IP_sub_3_endsub*k35f*s5/k35s - IP_sub_3_endsub*k35b*s41/k35p)/(1 + s5/k35s + s41/k35p);  // modifiers: IP_sub_3_endsub
    k35f = 1; k35b = 1; k35s = 1; k35p = 1;
  re14: s41 => IP_sub_3_endsub_R_space_I1; k36*s41;
    k36 = 1;
  re15: IP_sub_3_endsub_R_space_I1 => IP_sub_3_endsub_R_space_I2; k37*IP_sub_3_endsub_R_space_I1;
    k37 = 1;
  re16: IP_sub_3_endsub_R_space_I1 => s5; k38*IP_sub_3_endsub_R_space_I1;
    k38 = 1;
  re17: IP_sub_3_endsub_R_space_I2 => s5; k39*IP_sub_3_endsub_R_space_I2;
    k39 = 1;
  re18: Ca_super_2_plus__endsuper_ER -> Ca_super_2_plus__endsuper_default; (s41*k40f*Ca_super_2_plus__endsuper_ER/k40s - s41*k40b*Ca_super_2_plus__endsuper_default/k40p)/(1 + Ca_super_2_plus__endsuper_ER/k40s + Ca_super_2_plus__endsuper_default/k40p);  // modifiers: s41
    k40f = 1; k40b = 1; k40s = 1; k40p = 1;
  re20: GDP -> GTP; kgdp*GDP - kgtp*GTP;
    kgdp = 10; kgtp = 1;
  re21: DAG -> PI; DGK*(k47f*DAG/k47m - k47b*PI/k47p)/(1 + DAG/k47m + PI/k47p);  // modifiers: DGK
    k47f = 1; k47b = 1; k47m = 1; k47p = 1;
  re22: PI -> PIP; (PI_space_kinase*k48f*PI/k48s - PI_space_kinase*k48b*PIP/k48p)/(1 + PI/k48s + PIP/k48p);  // modifiers: PI_space_kinase
    k48f = 1; k48b = 1; k48s = 1; k48p = 1;
  re23: PIP -> PIP_sub_2_endsub; (1*PIP_space_kinase*PIP/k49s - 1*PIP_space_kinase*PIP_sub_2_endsub/k49p)/(1 + PIP/k49s + PIP_sub_2_endsub/k49p);  // modifiers: PIP_space_kinase
    k49s = 1; k49p = 1;
  re25: CaM + Ca_super_2_plus__endsuper_default -> s49; k41s*Ca_super_2_plus__endsuper_default*CaM - k41p*s49;
    k41s = 0.1; k41p = 0.6;
  re29: RGS + s49 -> s59; k26*RGS*s49 - k26r*s59;
    k26 = 1; k26r = 1;
  re45: s88 => Complex_GTP_G_alpha + G_beta__gamma; k30*s88;
    k30 = 1;
  re46: Complex_GTP_G_alpha + PLC_beta => Complex_G_alpha__PLC_beta__GTP; k22*Complex_GTP_G_alpha*PLC_beta;
    k22 = 1;
  re47: s91 => s88 + Ligand_space_GPCR; k28*s91;
    k28 = 0;
  re48: GTP + s95 => s91; k21*GTP*s95;
    k21 = 1;
  re49: s99 => s95 + GDP; k27*s99;
    k27 = 1;
  re50: Ligand_space_GPCR + s106 => s99; k32*Ligand_space_GPCR*s106;
    k32 = 1;
  re51: G_beta__gamma + Complex_GDP_G_alpha => s106; k24*G_beta__gamma*Complex_GDP_G_alpha;
    k24 = 1;
  re52: Complex_G_alpha__PLC_beta__GDP => PLC_beta + Complex_GDP_G_alpha; k31f*Complex_G_alpha__PLC_beta__GDP;
    k31f = 1;
  re53: Complex_G_alpha__PLC_beta__GTP => Complex_G_alpha__PLC_beta__GDP; (k59f*s59*Complex_G_alpha__PLC_beta__GTP/k59mf - k59b*s59*Complex_G_alpha__PLC_beta__GDP/k59mb)/(1 + Complex_G_alpha__PLC_beta__GTP/k59mf + Complex_G_alpha__PLC_beta__GDP/k59mb);  // modifiers: s59
    k59f = 1.5; k59b = 1; k59mf = 5; k59mb = 2.5;
end
